// SBML level 3 version 2

model BuddingYeastCellCycle_2015()
  // Budding Yeast Cell Cycle Model 2015

  // Compartments:
  compartment cell = 1; cell is "Cell";

  // Species:
  species CDC5A in cell = 0.5047493;
  species CDC55 in cell = 0.027;
  species UDNA in cell = 0;
  species PsS6S4p in cell = 0;
  species SPNALIGN in cell = 0;
  species CDC15 in cell = 0.8594436;
  species PDS1T in cell = 0.03379669;
  species PsS6S4Wp in cell = 0.1360806;
  species CLN3 in cell = 0.08404824;
  species CLN2 in cell = 0.1960308;
  species BUB2 in cell = 0.02432211;
  species PsS6Mp in cell = 0;
  species NET1A in cell = 0.2751873;
  species PsS6S4np in cell = 0;
  species APCP in cell = 1.137386;
  species MASS in cell = 1.085076;
  species SWI5T in cell = 0.3030963;
  species ORIFLAG in cell = 1;
  species BCK2 in cell = 0.2698306;
  species CLB5T in cell = 0.03809914;
  species PsS4p in cell = 0;
  species SWE1T in cell = 0.03866815;
  species SWE1P in cell = 0.01001595;
  species ORI in cell = 0.009329498;
  species CKIT in cell = 0.02175321;
  species CKIP in cell = 8.645315e-11;
  species CLB2T in cell = 0.1746646;
  species SPN in cell = 0.06445256;
  species PmS6Mp in cell = 0.9417913;
  species MAD2A in cell = 0.0631248;
  species TEM1 in cell = 0.5200261;
  species CDC20T in cell = 0.5993166;
  species BUD in cell = 0.03118667;
  species CDC14c in cell = 0;
  species CDH1A in cell = 0.78684;
  species PmS6S4p in cell = 0.2007186;
  species CDC5T in cell = 0.2716462;

  // Parameters:
  ks4s6p = 1;
  wa_polo_b2 = 4.8;
  PmS6S4p_init = 0.2007186;
  wssa1_clb2 = 2;
  APCP_init = 1.137386;
  Jspn = 0.14;
  mlabfix_F_ = 96480;
  kd_ki = 0.0153;
  k_cdc14_exp = 13;
  ks4s6 = 0.216;
  Vmax = 300;
  MASS_init = 1.085076;
  CDC55_init = 0.027;
  ks_ori_e = 2;
  wi_apc = 0.7;
  ks_cdc20 = 0.0008;
  wi_tem1_bub2 = 2.5;
  SWE1T_init = 0.03866815;
  wi_mad2 = 0.6;
  PsS6S4Wp_init = 0.1360806;
  kd_k2 = 0.25;
  wdp_cki_14 = 1.747;
  kmass_clb5 = 0.2;
  kmass_clb2 = 1.8;
  ks_cln2_sbf = 0.1;
  ESP1T = 0.5;
  wp_s4s6pw_b5 = 0.01;
  wp_s4s6pw_b2 = 2.87;
  ks_clb5_mbf = 0.0156;
  KEZ = 0.2;
  ks_pds1_mbf = 0.03;
  ks_pds1 = 0.03;
  LumpedJ_reaction_49 = 0;
  LumpedJ_reaction_48 = 0;
  LumpedJ_reaction_47 = 0;
  Bub2T = 1;
  k_mbf_swi4 = 1.1;
  rho_14_net1 = 1;
  CLB2T_init = 0.1746646;
  CDH1A_init = 0.78684;
  wi_bub2_lo = 3.85;
  SWI5T_init = 0.3030963;
  ks_swi5 = 0.005;
  wdp_swe1 = 0.5;
  wdp_net1_14 = 2.51;
  kydj1 = 2.5;
  wi_mcm1 = 1.7;
  wa_mad2 = 30;
  Whi5 = 10;
  ks4 = 0.213;
  ks_cln2 = 0;
  wp_net1_en = 6.6;
  wp_s6s4_b2 = 0.4;
  PsS4p_init = 0;
  NET1T = 3.55;
  BCK2_init = 0.2698306;
  Pm_0 = 2;
  CLB5T_init = 0.03809914;
  wi_ppx_p1 = 0.981;
  gammki = 10;
  e_bud_b5 = 0.38;
  SPNALIGN_init = 0;
  NET1A_init = 0.2751873;
  Theta_cleave = 0.05;
  K_millivolts_per_volt = 1000;
  mlabfix_K_GHK_ = 1e-9;
  APCT = 25;
  wa_cdc15_14 = 0.85;
  wi_bub2_lte_lo = 6.7;
  ORIFLAG_init = 1;
  gamm = 1;
  wi_s6s4 = 0.5;
  kmass_ydj1 = 2.9;
  BUB2_init = 0.02432211;
  wa_apc_b2 = 0.625;
  kd_cdc20 = 0.32;
  kd_swi5 = 0.08;
  kd_clb2_20_i = 0.15;
  CDC5A_init = 0.5047493;
  wa_bub2_px = 0.8;
  mlabfix_F_nmol_ = 9.648e-5;
  PsS6S4p_init = 0;
  ks_n3 = 0.1;
  wp_s4s4p_k2 = 8.5;
  kd_clb5_20 = 0.8;
  ks_swe1 = 0.001;
  kd_cln3 = 0.2;
  CDC15_init = 0.8594436;
  wp_cki_n2 = 1.15;
  wa_mcm1_b2 = 10;
  sigcdc15 = 10;
  wa_swi5 = 0.2;
  wi_cdh1_b5 = 9.1;
  wi_cdh1_b2 = 0.162;
  wa_cdh1_14 = 1.1;
  ks_clb2_m1 = 0.19772;
  wp_net1_15 = 0.288;
  e_ori_b5 = 0.5;
  kd_pds_20_i = 1.7;
  e_ori_b2 = 0.35;
  wp_clb2_swe1 = 1.05;
  wp_net1_b2 = 0.0225;
  CDC20T_init = 0.5993166;
  mlabfix_T_ = 300;
  k_cdc14_imp = 0.022;
  wi_s4s6pw = 0.8;
  kd_ori = 0.06;
  UDNA_init = 0;
  ks_swi5_m1 = 0.03;
  ks_k2 = 0.13;
  PsS6S4np_init = 0;
  wi_s6mb = 0.5;
  wpm_s6s4_n3 = 3.6;
  wpm_s6s4_n2 = 0.28;
  wp_s6mb_n3 = 3.3;
  wa_bub2 = 2.71;
  wp_s6mb_n2 = 0.2;
  hCDC6 = 1;
  kd_swe1 = 0.01;
  CLB2nd = 0;
  ks_spn = 0.24;
  CKIP_init = 8.645315e-11;
  kd_polo_h1 = 1.5;
  wdp_cki = 0.7;
  mlabfix_R_ = 8314;
  sig = 10;
  kd_spn = 0.03;
  wi_cdc15_b2 = 0.0149;
  ks_polo = 0;
  ks_polo_m1 = 0.22;
  wdp_clb2 = 1.5;
  kd_cdh1_swe1 = 0.5;
  wdp_net1_px = 1;
  CLN3_init = 0.08404824;
  gammcp = 0.5;
  wp_net1 = 0.22;
  TEM1T = 2;
  ks6m = 0.63;
  wpm_s6s4_k2 = 0.6;
  wi_swi5_b2 = 1;
  wp_s6mb_k2 = 0.04;
  wi_polo = 0.2;
  kd_cdh1_swe1p = 0.7;
  kmass_cln3 = 12;
  h_sic1 = 1;
  kd_pds_20 = 2.5;
  wa_tem1_polo = 1.1;
  wp_s4s6pw_n3 = 8.43;
  SWE1P_init = 0.01001595;
  wp_s4s6pw_n2 = 0.01;
  kd_bud = 0.01;
  MDT = 90;
  BUD_init = 0.03118667;
  kd_polo = 0.3;
  MassatGAL = 0.818;
  wi_cdc15 = 0.23;
  MAD2T = 25;
  k_mbf_mp = 0.16;
  ks_bud_e = 1.3;
  kd_swe1p = 0.2;
  kd_clb2_h1 = 0.6;
  gammtem = 0.1;
  wi_s4s4p = 0.5;
  wa_cdh1 = 0.032;
  ks_clb5 = 0.0008;
  CLN2_init = 0.1960308;
  ks_clb2 = 0.005;
  wp_s4s4p_b2 = 4.5;
  MAD2A_init = 0.0631248;
  Ps_0 = 2;
  wp_swe1_clb2 = 1.5;
  wp_s4s6pw_k2 = 2.1;
  ks_cki = 0.0011520415;
  ks_cki_swi5 = 0.02745;
  MCM1T = 1;
  KEZ2 = 0.199;
  kd_pds = 0.01;
  CDC55T = 1;
  Swi6 = 30;
  Swi4 = 5.5;
  CDC15T = 1;
  e_bud_n3 = 0.3;
  e_bud_n2 = 0.45;
  TEM1_init = 0.5200261;
  mlabfix_PI_ = 3.141593;
  CDC14T = 2;
  kd_kip = 0.5;
  PmS6Mp_init = 0.9417913;
  kd_clb5 = 0.035;
  TEV = 0;
  kd_clb2 = 0.0086;
  kmass_bck2 = 3;
  wp_cki_b5 = 9.5;
  wp_cki_b2 = 1.65;
  f = 0.4586;
  Mbp1 = 5.5;
  mlabfix_N_pmol_ = 602000000000;
  kd_clb2_20 = 1.142;
  CDH1T = 1;
  MassatGlu = 1.0898;
  ks_cdc20_m1 = 0.2;
  kd_clb5_20_i = 0.25;
  wa_swi5_14 = 5.1;
  KMOLE = 0.00166113;
  SPN_init = 0.06445256;
  PDS1T_init = 0.03379669;
  wi_cdh1_n2 = 0.9;
  Size_cell = 1;
  k_clb5 = 0.2;
  SSA1T = 1;
  CDC14c_init = 0;
  PsS6Mp_init = 0;
  CKIT_init = 0.02175321;
  CDC5T_init = 0.2716462;
  wa_tem1 = 0.5;
  wpm_s6s4_b5 = 4.62;
  wpm_s6s4_b2 = 0.035;
  kd_n2 = 0.135;
  wp_s6mb_b5 = 6.2;
  wdp_net = 0.055;
  wp_s6mb_b2 = 0.03;
  HU = 0;
  ORI_init = 0.009329498;
  wa_bub2_14 = 0.05;
  ks_sbf_swe1 = 0.007;
  NOC = 0;
  wssa1 = 1;

  // Assignment rules:
  Wclb2 := wp_clb2_swe1*SWE1T - wdp_clb2;
  CLB2f := ;
  CLB2 := CLB2f - CLB2f/(1 + exp(-sig*Wclb2));
  Wswe1 := wp_swe1_clb2*CLB2 - wdp_swe1;
  ESP1 := ;
  GLUE := ESP1 + TEV;
  I_SPOC := ;
  S6S4 := ;
  PsS6S4W := ;
  PsS6S4free := ;
  PsS6S4 := ;
  S6S4free := S6S4 - PsS6S4W - PsS6S4;
  PmS6S4 := ;
  S4free := Swi4 - PsS6S4 - PsS6S4W - PmS6S4;
  LumpedJ_reaction_53 := (kd_swe1p + kd_cdh1_swe1p*CDH1A)*SWE1P;
  LumpedJ_reaction_52 := gamm*(SWE1T/(1 + exp(-sig*Wswe1)) - SWE1P);
  LumpedJ_reaction_51 := (kd_swe1 + kd_cdh1_swe1*CDH1A)*(SWE1T - SWE1P) + (kd_swe1p + kd_cdh1_swe1p*CDH1A)*SWE1P;
  VS2 := PsS6S4Wp + ks4s6p*PsS6S4p + ks4s6*PsS6S4np + ks6m*PsS6Mp + ks4*PsS4p;
  LumpedJ_reaction_50 := ks_swe1 + ks_sbf_swe1*VS2;
  S6M := ;
  PmS6M := ;
  S6Mfree := S6M - PmS6M;
  Wmcm1 := wa_mcm1_b2*CLB2 - wi_mcm1;
  MCM1 := MCM1T/(1 + exp(-sig*Wmcm1));
  CDC14 := ;
  Wbub2 := wa_bub2_px*CDC55 + wa_bub2_14*CDC14 + wa_bub2 - wi_bub2_lte_lo*CDC5A*I_SPOC - wi_bub2_lo*CDC5A;
  LumpedJ_reaction_46 := gamm*(Bub2T/(1 + exp(-sig*Wbub2)) - BUB2);
  Wpolo := wa_polo_b2*CLB2 - wi_polo;
  LumpedJ_reaction_45 := gamm*(CDC5T/(1 + exp(-sig*Wpolo)) - CDC5A);
  LumpedJ_reaction_44 := (kd_polo + kd_polo_h1*CDH1A)*CDC5T;
  LumpedJ_reaction_43 := ks_polo + ks_polo_m1*MCM1;
  Wtem1 := wa_tem1_polo*CDC5A + wa_tem1 - wi_tem1_bub2*BUB2;
  LumpedJ_reaction_42 := gammtem*(TEM1T/(1 + exp(-sig*Wtem1)) - TEM1);
  Wcdc15 := wa_cdc15_14*CDC14 - wi_cdc15 - wi_cdc15_b2*CLB2;
  LumpedJ_reaction_41 := gamm*(CDC15T/(1 + exp(-sigcdc15*Wcdc15)) - CDC15);
  CDC15f := ;
  MEN := ;
  CDC14n := CDC14 - CDC14c;
  Wnet1 := wdp_net1_px*CDC55 + wdp_net + wdp_net1_14*CDC14n - CDC5A*(wp_net1 + wp_net1_b2*CLB2 + wp_net1_en*MEN + wp_net1_15*CDC15f);
  LumpedJ_reaction_40 := gamm*(NET1T/(1 + exp(-sig*Wnet1)) - NET1A);
  Psfree := ;
  LumpedJ_reaction_39 := k_cdc14_imp*CDC14c;
  LumpedJ_reaction_38 := k_cdc14_exp*(CDC14 - CDC14c)*MEN;
  Wcdc55 := -wi_ppx_p1*ESP1;
  LumpedJ_reaction_37 := gamm*(CDC55T/(1 + exp(-sig*Wcdc55)) - CDC55);
  CDC20A := ;
  CDC20A_APCP := ;
  CDC20A_APC := ;
  LumpedJ_reaction_36 := (kd_pds + kd_pds_20*CDC20A_APCP + kd_pds_20_i*CDC20A_APC)*PDS1T;
  Pmfree := ;
  VS5 := k_mbf_mp*PmS6Mp + k_mbf_swi4*PmS6S4p + Pmfree*k_clb5*ks_clb5/(ks_clb5_mbf + 1e-8);
  LumpedJ_reaction_35 := ks_pds1 + ks_pds1_mbf*VS5;
  CLB5 := ;
  Wcdh1 := wa_cdh1 + wa_cdh1_14*CDC14 - (wi_cdh1_n2*CLN2 + wi_cdh1_b5*CLB5 + wi_cdh1_b2*CLB2);
  SAC := ;
  Wmad2 := wa_mad2*SAC - wi_mad2;
  LumpedJ_reaction_34 := gamm*(MAD2T/(1 + exp(-sig*Wmad2)) - MAD2A);
  LumpedJ_reaction_33 := kd_cdc20*CDC20T;
  LumpedJ_reaction_32 := ks_cdc20 + ks_cdc20_m1*MCM1;
  Wapc := wa_apc_b2*CLB2 - wi_apc;
  LumpedJ_reaction_31 := gammcp*(APCT/(1 + exp(-sig*Wapc)) - APCP);
  LumpedJ_reaction_30 := gamm*(CDH1T/(1 + exp(-sig*Wcdh1)) - CDH1A);
  Wssa1 := wssa1_clb2*CLB2 - wssa1;
  LumpedJ_reaction_29 := kd_swi5*SWI5T;
  LumpedJ_reaction_28 := ks_swi5 + ks_swi5_m1*MCM1;
  LumpedJ_reaction_27 := kd_spn*SPN;
  LumpedJ_reaction_26 := ;
  LumpedJ_reaction_25 := kd_ori*ORI;
  PsS4 := ;
  LumpedJ_reaction_24 := ks_ori_e*(e_ori_b5*CLB5 + e_ori_b2*CLB2);
  LumpedJ_reaction_23 := kd_bud*BUD;
  SSA1p := SSA1T/(1 + exp(-sig*Wssa1));
  Ydj1 := kydj1*(1 - exp(-(MASS/kmass_ydj1)));
  SSA1free := ;
  CLN3n := ;
  LumpedJ_reaction_22 := ks_bud_e*(e_bud_n3*CLN3n + e_bud_n2*CLN2 + e_bud_b5*CLB5);
  LumpedJ_reaction_21 := (kd_clb2 + kd_clb2_20*CDC20A_APCP + kd_clb2_20_i*CDC20A_APC + kd_clb2_h1*CDH1A)*CLB2T;
  LumpedJ_reaction_20 := (ks_clb2 + ks_clb2_m1*MCM1)*(1 - exp(-(MASS/kmass_clb2)));
  SPNvsESP := ;
  Ws6s4w := wp_s4s6pw_n3*CLN3n + wp_s4s6pw_k2*BCK2 + wp_s4s6pw_n2*CLN2 + wp_s4s6pw_b5*CLB5 - wi_s4s6pw - CLB2*wp_s4s6pw_b2;
  LumpedJ_reaction_19 := (kd_clb5 + kd_clb5_20*CDC20A_APCP + kd_clb5_20_i*CDC20A_APC)*CLB5T;
  LumpedJ_reaction_18 := (ks_clb5 + ks_clb5_mbf*VS5)*(1 - exp(-(MASS/kmass_clb5)));
  LumpedJ_reaction_17 := kd_kip*CKIP;
  Wcki := wp_cki_n2*CLN2 + wp_cki_b5*CLB5 + wp_cki_b2*CLB2 - wdp_cki - wdp_cki_14*CDC14;
  LumpedJ_reaction_16 := gammki*(CKIT/(1 + exp(-sig*Wcki)) - CKIP);
  LumpedJ_reaction_15 := kd_ki*(CKIT - CKIP) + kd_kip*CKIP;
  Wswi5 := -wi_swi5_b2*CLB2 + wa_swi5 + wa_swi5_14*CDC14;
  SWI5A := SWI5T/(1 + exp(-sig*Wswi5));
  LumpedJ_reaction_14 := ks_cki + ks_cki_swi5*SWI5A;
  LumpedJ_reaction_13 := kd_n2*CLN2;
  LumpedJ_reaction_12 := ks_cln2 + ks_cln2_sbf*VS2;
  Ws4 := wp_s4s4p_k2*BCK2 - wi_s4s4p - CLB2*wp_s4s4p_b2;
  LumpedJ_reaction_11 := gamm*(PsS4/(1 + exp(-sig*Ws4)) - PsS4p);
  Ws6m := wp_s6mb_n3*CLN3n + wp_s6mb_k2*BCK2 + wp_s6mb_n2*CLN2 + wp_s6mb_b5*CLB5 - wi_s6mb - CLB2*wp_s6mb_b2;
  Psfree2 := ;
  PsS6M := ;
  LumpedJ_reaction_10 := gamm*(PsS6M/(1 + exp(-sig*Ws6m)) - PsS6Mp);
  Ws6s4np := -(wpm_s6s4_n3*CLN3n + wpm_s6s4_k2*BCK2 + wpm_s6s4_n2*CLN2 + wpm_s6s4_b5*CLB5 - wi_s6s4) - CLB2*wp_s6s4_b2;
  Whi5free := Whi5 - PsS6S4W;
  mu := ln(2)/MDT;
  UDNA1 := ;
  PmS4 := ;
  LumpedJ_reaction_9 := gamm*(PsS6S4W/(1 + exp(-sig*Ws6s4w)) - PsS6S4Wp);
  LumpedJ_reaction_8 := gamm*(PsS6S4/(1 + exp(-sig*Ws6s4np)) - PsS6S4np);
  Ws6s4 := wpm_s6s4_n3*CLN3n + wpm_s6s4_k2*BCK2 + wpm_s6s4_n2*CLN2 + wpm_s6s4_b5*CLB5 - wi_s6s4 - CLB2*wpm_s6s4_b2;
  LumpedJ_reaction_7 := gamm*(PsS6S4/(1 + exp(-sig*Ws6s4)) - PsS6S4p);
  LumpedJ_reaction_6 := gamm*(PmS6S4/(1 + exp(-sig*Ws6s4)) - PmS6S4p);
  LumpedJ_reaction_5 := gamm*(PmS6M/(1 + exp(-sig*Ws6m)) - PmS6Mp);
  LumpedJ_reaction_4 := kd_k2*BCK2;
  LumpedJ_reaction_3 := ks_k2*(1 - exp(-(MASS/kmass_bck2)));
  LumpedJ_reaction_2 := kd_cln3*CLN3;
  LumpedJ_reaction_1 := ks_n3*(1 - exp(-(MASS/kmass_cln3)));
  LumpedJ_reaction_0 := mu*MASS*(1 - MASS/Vmax);

  // Rate rules:
  CDC5A' = LumpedJ_reaction_45/Size_cell;
  CDC55' = LumpedJ_reaction_37/Size_cell;
  UDNA' = LumpedJ_reaction_49/Size_cell;
  PsS6S4p' = LumpedJ_reaction_7/Size_cell;
  SPNALIGN' = LumpedJ_reaction_48/Size_cell;
  CDC15' = LumpedJ_reaction_41/Size_cell;
  PDS1T' = LumpedJ_reaction_35/Size_cell - LumpedJ_reaction_36/Size_cell;
  PsS6S4Wp' = LumpedJ_reaction_9/Size_cell;
  CLN3' = LumpedJ_reaction_1/Size_cell - LumpedJ_reaction_2/Size_cell;
  CLN2' = LumpedJ_reaction_12/Size_cell - LumpedJ_reaction_13/Size_cell;
  BUB2' = LumpedJ_reaction_46/Size_cell;
  PsS6Mp' = LumpedJ_reaction_10/Size_cell;
  NET1A' = LumpedJ_reaction_40/Size_cell;
  PsS6S4np' = LumpedJ_reaction_8/Size_cell;
  APCP' = LumpedJ_reaction_31/Size_cell;
  MASS' = LumpedJ_reaction_0/Size_cell;
  SWI5T' = LumpedJ_reaction_28/Size_cell - LumpedJ_reaction_29/Size_cell;
  ORIFLAG' = LumpedJ_reaction_47/Size_cell;
  BCK2' = LumpedJ_reaction_3/Size_cell - LumpedJ_reaction_4/Size_cell;
  CLB5T' = LumpedJ_reaction_18/Size_cell - LumpedJ_reaction_19/Size_cell;
  PsS4p' = LumpedJ_reaction_11/Size_cell;
  SWE1T' = LumpedJ_reaction_50/Size_cell - LumpedJ_reaction_51/Size_cell;
  SWE1P' = LumpedJ_reaction_52/Size_cell - LumpedJ_reaction_53/Size_cell;
  ORI' = LumpedJ_reaction_24/Size_cell - LumpedJ_reaction_25/Size_cell;
  CKIT' = LumpedJ_reaction_14/Size_cell - LumpedJ_reaction_15/Size_cell;
  CKIP' = LumpedJ_reaction_16/Size_cell - LumpedJ_reaction_17/Size_cell;
  CLB2T' = LumpedJ_reaction_20/Size_cell - LumpedJ_reaction_21/Size_cell;
  SPN' = LumpedJ_reaction_26/Size_cell - LumpedJ_reaction_27/Size_cell;
  PmS6Mp' = LumpedJ_reaction_5/Size_cell;
  MAD2A' = LumpedJ_reaction_34/Size_cell;
  TEM1' = LumpedJ_reaction_42/Size_cell;
  CDC20T' = LumpedJ_reaction_32/Size_cell - LumpedJ_reaction_33/Size_cell;
  BUD' = LumpedJ_reaction_22/Size_cell - LumpedJ_reaction_23/Size_cell;
  CDC14c' = LumpedJ_reaction_38/Size_cell - LumpedJ_reaction_39/Size_cell;
  CDH1A' = LumpedJ_reaction_30/Size_cell;
  PmS6S4p' = LumpedJ_reaction_6/Size_cell;
  CDC5T' = LumpedJ_reaction_43/Size_cell - LumpedJ_reaction_44/Size_cell;
end
